** STEP: Step1
**
*Step, name=Step1,nlgeom=no,solver=iterative, inc=2
*Heat transfer, steady state
1.0000000000e+00, 1.0000000000e+00, 1.0000000000e-01, 1.0000000000e+00
**
** BOUNDARY CONDITIONS
**
*Boundary
refnode1, 11, 11, 144
*Boundary
refnode2, 11, 11, 0
*Boundary
refnode3, 11, 11, 0
*Boundary
point1, 11, 11, 0
**
** OUTPUT REQUESTS
**
*Restart, write, frequency=0
**
** FIELD OUTPUT
**
*EL FILE, DIRECTIONS=YES
HFL
**
** HISTORY OUTPUT
**
*Output, history, variable=PRESELECT
*End Step
